// COMSOL Multiphysics 5.4.0.346 model "ECC_reference_input.mph"
// Outline of the model tree

Parameters
  co = (20)*1e6
  st = 1e-16
  th = tan(pi/180*20)
  stm = st*3600*365*24*L_to*1e3*100
  A1 = 3.16e-26
  A2 = 3.2e-20
  A3 = 7.0e-14
  n1 = 3.0
  n2 = 3.05
  n3 = 3.0
  d_uc = 14.5+3.3*(2)*0+0.5+4.6-3.3  // upper crust thickness
  d_lc = d_tL-d_uc  // lower crust thickness
  d_ex = 12  // extened crust thickness
  d_co = (rho_lc*(d_tL-d_ex)-d_uc+d_a)/rho_oc  // comp depth
  d_tL = 30  // total thickness
  rho_uc = 27  // upper crust density
  rho_lc = 28  // lower crust density
  rho_oc = 33  // oceanic crust density
  L_c = 180  // crust_length
  L_o = 240  // ocean_length
  L_p = 5*4  // margin_length
  L_to = L_o+2*(L_c+L_p)  // total length
  E_uc = 100e9[Pa]  // young's upper crust
  E_lc = 100e9[Pa]  // young's lower crust
  E_oc = 100e9[Pa]  // young's oceanic crust
  LAB = -d_tL*3-10
  rho_se = 20
  d_b1 = d_tL-d_co-d_b-d_a  // base1 depth
  stm_ = st*L_to*1e3
  L_cpc = L_to-2*L_c
  ts = 3.1536e12
  d_mo = d_tL-d_co  // moho depth
  d_a = 4  // exupper thick
  d_b = d_ex-d_a  // exlower thick
  d_b2 = d_tL-d_co-d_b  // base2 depth
  alpha = -60.0
  vari = 2
  fri = 15
  bee = 1

Functions
  step1: Step | location = ts*10; smooth = ts*10
  step2: Step (disabled) | location = 3.1536e11*6; smooth = 3.1536e11*4

Variables
  var3 "Variables 3" (disabled)
    sex = solid.eel11-1/3*(solid.eel11+solid.eel22)
    sxx = solid.el11-1/3*(solid.el11+solid.el22)
    spxx = sex-sxx
    sey = solid.eel22-1/3*(solid.eel11+solid.eel22)
    syy = solid.el22-1/3*(solid.eel11+solid.eel22)
    spyy = sey-syy
    sexy = solid.eel12
    seexy = solid.el12
    spxy = sexy-seexy
    srpxx = d(spxx,TIME)
    srpyy = d(spyy,TIME)
    srpxy = d(spxy,TIME)
    erpii = sqrt(2*srpxy^2+srpxx^2+srpyy^2 + ss)*1
    ss = 1e-34
    srpxx1 = d(sex,TIME)
    srpyy1 = d(sey,TIME)
    srpxy1 = d(sexy,TIME)
    erpii1 = sqrt(2*srpxy1^2+srpxx1^2+srpyy1^2 + ss)
  var1 "Variables 1"
    np = np_/st[1/s]
    np_ = sy_*tan(fri*pi/180)+20[MPa]
    nt2_ = 0.01*0.5*(5.77904e-27^(-1/4.7))*(st_^((1-4.7)/4.7))*(exp(4.85e5/(4.7*8.314*T[1/K])))[Pa*s]*vari
    nu_oc1 = min(nt3_,npc)
    nt3_ = 3*0.5*(1.76e-14^(-1/3))*(st_^((1-3)/3))*(exp(4.3e5/(3*8.314*T[1/K])))[Pa*s]*vari
    nt2__ = 2* ((3.2e-20)^(-1/3))*((st_)^((1-3)/3))*exp((276e3)/8.314/3/T[1/K])[Pa*s]*vari
    nt3__ = 2* ((2e-21)^(-1/4))*((st_)^((1-4)/4))*exp((515e3)/8.314/4/T[1/K])[Pa*s]*vari
    nu_uc = min(nt1_,np)
    nt1__ = 2* ((3.16e-26)^(-1/3.3))*((st_)^((1-3.3)/3.3))*exp(186e3/8.314/3.3/T[1/K])[Pa*s]*vari
    nu_oc = min(nt3_,npc)
    syc = dom
    st_ = st
    nu_lc = min(nt2_,np)
    nt1_ = 0.1*0.5*(1.1e-28^(-1/4))*(st_^((1-4)/4))*(exp(2.23e5/(4*8.314*T[1/K])))[Pa*s]*vari
    npc = npc_/st[1/s]
    npc_ = syc*tan(fri*pi/180)+20[MPa]
    sy_ = dom
  var4 "Variables 4"
    d11 = rho_uc*(-Y)*(Y>=-d_uc[km])
    d12 = (rho_uc*d_uc[km]+rho_lc*(-Y-d_uc[km]))*(Y>=-d_tL[km])*(Y<-d_uc[km])
    d1 = (d11+d12+d13)
    d21 = (rho_uc*(y1-Y))*(Y>y2)*(Y<=y1)
    d22 = (rho_uc*(-y2+y1)+rho_lc*(y2-Y))*(Y<=y2)*(Y>y3)
    d23 = (rho_uc*(-y2+y1)+rho_lc*(y2-y3)+rho_oc*(y3-Y))*(Y<=y3)*(Y>=-d_tL[km])
    d2 = (d21+d22+d23+d24)
    d31 = rho_uc*(-d_b1[km]-Y)*(Y<=-d_b1[km])*(Y>-d_b2[km])
    d32 = (rho_uc*(d_a[km])+rho_lc*(-Y-d_b2[km]))*(Y<=-d_b2[km])*(Y>-d_mo[km])
    d3 = d31+d32+d33+d34
    d13 = (rho_uc*d_uc[km]+rho_lc*d_lc[km]+rho_oc*(-Y-d_tL[km]))*(Y<-d_tL[km])
    d24 = (rho_uc*(-y2+y1)+rho_lc*(y2-y3)+rho_oc*(y3+d_tL[km])+rho_oc*(-Y-d_tL[km]))*(Y<-d_tL[km])
    dom_ = d1*(X<L_c[km])+d2*(X>=L_c[km])*(X<=(L_c[km]+L_p[km]))+d3*(X>(L_c[km]+L_p[km]))*(X<(L_to[km]-L_c[km]-L_p[km]))+d4*(X>=(L_to[km]-L_c[km]-L_p[km]))*(X<=(L_to[km]-L_c[km]))+d1*(X>(L_to[km]-L_c[km]))
    d41 = (rho_uc*(y1_-Y))*(Y>y2_)*(Y<=y1_)
    d42 = (rho_uc*(-y2_+y1_)+rho_lc*(y2_-Y))*(Y<=y2_)*(Y>y3_)
    d43 = (rho_uc*(-y2_+y1_)+rho_lc*(y2_-y3_)+rho_oc*(y3_-Y))*(Y<=y3_)*(Y>=-d_tL[km])
    d4 = (d41+d42+d43+d44)
    d44 = (rho_uc*(-y2_+y1_)+rho_lc*(y2_-y3_)+rho_oc*(y3_+d_tL[km])+rho_oc*(-Y-d_tL[km]))*(Y<-d_tL[km])
    dom = dom_*100[kg/m^3]*g_const
    y2 = (-d_b2+d_uc)/L_p*(X-L_c[km])-d_uc[km]
    y1 = (-d_b1)/L_p*(X-L_c[km])
    y3 = (-d_mo+d_tL)/L_p*(X-L_c[km])-d_tL[km]
    y1_ = -(-d_b1)/L_p*(X-L_to[km]+L_c[km])
    y2_ = -(-d_b2+d_uc)/L_p*(X-L_to[km]+L_c[km])-d_uc[km]
    y3_ = -(-d_mo+d_tL)/L_p*(X-L_to[km]+L_c[km])-d_tL[km]
    d33 = (rho_uc*(d_a[km])+rho_lc*(d_b[km])+rho_oc*(-Y-d_mo[km]))*(Y<=-d_mo[km])*(Y>=-d_tL[km])
    d34 = (rho_uc*(d_a[km])+rho_lc*(d_b[km])+rho_oc*(d_co[km])+rho_oc*(-Y-d_tL[km]))*(Y<-d_tL[km])

Geometry
  geom1 "Geometry 1" (2D, length unit km)
    b12: BezierPolygon "upper 1.1"
      p = 
        {L_to-L_c, L_to, L_to, L_to-L_c, L_to-(L_c+L_p), L_to-(L_c+L_p)}
        {-d_uc, -d_uc, 0, 0, -d_b1, -d_b2}
      degree = {1, 1, 1, 1, 1}
      w = {1, 1, 1, 1, 1, 1, 1, 1, 1, 1}
    b13: BezierPolygon "lower 1.1"
      p = 
        {L_to, L_to, L_to-L_c, L_to-L_c-L_p, L_to-L_c-L_p, L_to-L_c}
        {-d_uc, -d_tL, -d_tL, -d_mo, -d_b2, -d_uc}
      degree = {1, 1, 1, 1, 1}
      w = {1, 1, 1, 1, 1, 1, 1, 1, 1, 1}
    b20: BezierPolygon "Bézier Polygon 20"
      p = {{L_p+L_c, L_to-(L_p+L_c), L_to-(L_p+L_c), L_p+L_c}, {-d_b1, -d_b1, -d_b2, -d_b2}}
      degree = {1, 1, 1}
      w = {1, 1, 1, 1, 1, 1}
    b26: BezierPolygon "Bézier Polygon 26"
      p = {{L_p+L_c, L_to-(L_p+L_c), L_to-(L_p+L_c), L_p+L_c}, {-d_b2, -d_b2, -d_mo, -d_mo}}
      degree = {1, 1, 1}
      w = {1, 1, 1, 1, 1, 1}
    b16: BezierPolygon "upper 1.2"
      p = {{L_c, 0, 0, L_c, L_c+L_p, L_c+L_p}, {-d_uc, -d_uc, 0, 0, -d_b1, -d_b2}}
      degree = {1, 1, 1, 1, 1}
      w = {1, 1, 1, 1, 1, 1, 1, 1, 1, 1}
    b17: BezierPolygon "lower 1.2"
      p = {{L_c, 0, 0, L_c, L_c+L_p, L_c+L_p}, {-d_uc, -d_uc, -d_tL, -d_tL, -d_mo, -d_b2}}
      degree = {1, 1, 1, 1, 1}
      w = {1, 1, 1, 1, 1, 1, 1, 1, 1, 1}
    b25: BezierPolygon "test2.1"
      p = 
        {0, (L_c), (L_c)+L_p, L_to-L_p-(L_c), L_to-L_c, L_to, L_to, 0}
        {(-d_tL), (-d_tL), -d_mo, -d_mo, -d_tL, -d_tL, LAB, LAB}
      degree = {1, 1, 1, 1, 1, 1, 1}
      w = {1, 1, 1, 1, 1, 1, 1, 1, 1, 1, 1, 1, 1, 1}
    pc3: ParametricCurve | pos = {0, -d_tL}; parmin = L_c; parmax = L_to-L_c; coord = {s, 0}
    pt1: Point | p = {L_to/2, -d_b1}
    fin: Finalize "Form Union"

Physics
  solid: SolidMechanics on domains 1-8
    dependent variable u = {u, v, w}
    ShapeProperty.order_displacement = 1
    StructuralTransientBehavior.StructuralTransientBehavior = Quasistatic
    lemm1: LinearElasticModel "ocean" (default)
      E_mat = userdef
      E = E_oc
      nu_mat = userdef
      nu = 0.25
      rho_mat = userdef
      rho = rho_oc*100
      vis1: Viscoelasticity (disabled) on all domains
        MaterialModel = SLS
        RelaxationParameter = Elastoviscosity
        etav = 3.15e23
        Gv = solid.G
    free1: Free (default)
    init1: init "Initial Values 1" (default)
    vel1: Velocity "Prescribed Velocity 1" on boundaries 25-27 | Direction = {1, 1, 0}; v = {-stm_/2*step1(t[1/s]), 0, 0}
    vel2: Velocity "Prescribed Velocity 2" on boundaries 1, 3, 5 | Direction = {1, 1, 0}; v = {stm_/2*step1(t[1/s]), 0, 0}
    gr1: Gravity (disabled) on all domains
    disp1: Displacement1 "Prescribed Displacement 1" on boundaries 2 | Direction = {0, 1, 0}
    bndl3: BoundaryLoad (disabled) on boundaries 7, 10, 15, 16, 21, 24 | FperArea = {0, 0[kg/m^3]*g_const*v, 0}
    bndl6: BoundaryLoad on boundaries 4, 22, 28 | FperArea = {0, 3300[kg/m^3]*g_const*v, 0}
    bndl4: BoundaryLoad (disabled) on boundaries 4, 22 | FperArea = {0, 500[kg/m^3]*g_const*v, 0}
    bndl5: BoundaryLoad (disabled) on boundaries 8, 12, 18 | FperArea = {0, 300[kg/m^3]*g_const*v, 0}
    lemm6: LinearElasticModel "upper 1" on domains 2, 3, 6-8
      E_mat = userdef
      E = E_uc*0.005*200
      nu_mat = userdef
      nu = 0.25
      rho_mat = userdef
      rho = rho_uc*100
      vis1: Viscoelasticity on all domains
        MaterialModel = SLS
        RelaxationParameter = Elastoviscosity
        etav = nu_uc
        Gv = solid.G
        minput_temperature_src = root.comp1.T
    lemm7: LinearElasticModel "lower 1" on domains 2, 5, 7
      E_mat = userdef
      E = E_lc*0.005*200
      nu_mat = userdef
      nu = 0.25
      rho_mat = userdef
      rho = rho_lc*100
      vis1: Viscoelasticity on all domains
        MaterialModel = SLS
        RelaxationParameter = Elastoviscosity
        etav = nu_lc
        Gv = solid.G
        minput_temperature_src = root.comp1.T
    lemm8: LinearElasticModel "ocean 1.1" on domains 1, 4
      E_mat = userdef
      E = nu_oc*st[1/s]*10
      nu_mat = userdef
      nu = 0.25
      rho_mat = userdef
      rho = rho_oc*100
      ForceLinearStrainRes = 1
      vis3: Viscoelasticity on domains 1, 4-6
        MaterialModel = SLS
        RelaxationParameter = Elastoviscosity
        etav = nu_oc
        Gv = solid.G
        minput_temperature_src = root.comp1.T
    lemm9: LinearElasticModel "upper 1.1" on domains 6
      E_mat = userdef
      E = nu_uc*st[1/s]*10
      nu_mat = userdef
      nu = 0.25
      rho_mat = userdef
      rho = rho_uc*100
      ForceLinearStrainRes = 1
      vis1: Viscoelasticity on all domains
        MaterialModel = SLS
        RelaxationParameter = Elastoviscosity
        etav = nu_uc
        Gv = solid.G
        minput_temperature_src = root.comp1.T
    lemm10: LinearElasticModel "lower 1.1" on domains 5
      E_mat = userdef
      E = nu_lc*st[1/s]*10
      nu_mat = userdef
      nu = 0.25
      rho_mat = userdef
      rho = rho_lc*100
      ForceLinearStrainRes = 1
      vis1: Viscoelasticity on all domains
        MaterialModel = SLS
        RelaxationParameter = Elastoviscosity
        etav = nu_lc
        Gv = solid.G
        minput_temperature_src = root.comp1.T
  ht: HeatTransfer "Heat Transfer in Solids" on all domains
    dependent variable T
    solid1: SolidHeatTransferModel "Solid 1" (default)
      k_mat = userdef
      k = 3.4
      rho_mat = userdef
      rho = 3300
      Cp_mat = userdef
      Cp = 1000
    init1: init "Initial Values 1" (default)
    ins1: ThermalInsulation (default)
    temp1: TemperatureBoundary "Temperature 1" on boundaries 7, 10, 15, 16, 21, 24 | T0 = 293.15[K]-20[K]
    temp7: TemperatureBoundary "Temperature 7" on boundaries 2 | T0 = 273.15[K]+1350[K]
    temp8: TemperatureBoundary "Temperature 8" on boundaries 4, 8, 12, 18, 22 | T0 = 273.15[K]+650[K]+alpha*1[K]
    temp5: TemperatureBoundary "Temperature 5" (disabled) on boundaries 4, 22 | T0 = 273.15[K]+550[K]-0[K]

Mesh
  mesh1 "Mesh 1"
    size: MeshSizeDefault | hmax = 20; hmin = 0.001; hauto = 1; custom = on
    ftri3: FreeTri "Free Triangular 3" on domains 4-6
      size1: Size on domains 4-6 | hmax = 0.5*2; custom = on
    ftri2: FreeTri "Free Triangular 2" on remaining entities

Studies
  std1 "Study 1"
    param: Parametric "Parametric Sweep" | sweeptype = filled; pname = alpha; plistarr = range(0,-10,-300)
    stat: Stationary | geometricNonlinearity = on; solve for = {ht}
    time: Transient "Time Dependent" | tlist = range(0,ts/2,ts*100/2); geometricNonlinearity = on; solve for = {solid}

Solver configurations
  sol1 "Solution 1" (study std1)
    v1: Variables "Dependent Variables 1"
    s1: Stationary "Stationary Solver 1"
      fc1: FullyCoupled | linsolver = d1; initstep = 0.01; minstep = 1.0E-6; maxiter = 50
      d1: Direct "PARDISO (ht)" | linsolver = pardiso; pivotperturb = 1.0E-13
    su1: StoreSolution
    v2: Variables "Dependent Variables 2" | initmethod = sol; notsolmethod = sol
      comp1_u: Field "Displacement field (comp1.u)" | scalemethod = manual; scaleval = 1e-2*647765.3896280659
    t1: Time "Time-Dependent Solver 1" | tlist = range(0,ts/2,ts*100/2)
      dDef: Direct
      fc1: FullyCoupled | linsolver = dDef
  sol3 "Parametric Solutions 1" (study std1)
  sol2 "Solution Store 1" (study std1)

Datasets
  dset2: Solution | solution = none
  dset3: Solution | solution = sol1
  dset4: Solution | solution = sol2
  dset5: Solution | solution = sol3
  cln5: CutLine2D | data = dset5; genpoints = {{250, 0}, {250, -100}}; spacevars = cln4x; normal = {cln4nx, cln4ny}
  cln6: CutLine2D
    data = dset5
    genpoints = {{200, 0}, {200, -100}}
    genparadist = range(20,220/11,240)
    spacevars = cln4x
    normal = {cln4nx, cln4ny}

Plots
  pg19: PlotGroup2D "Stress (solid) 1" | data = dset5
    surf1: Surface (disabled) | expr = solid.mises; unit = MPa; descr = von Mises stress
      def: Deform "Deformation" | expr = {u, v}
      sel1: Selection on domains 1, 4-6
    surf2: Surface (disabled) | expr = solid.mises; unit = N/m^2; descr = von Mises stress
      def: Deform "Deformation" | expr = {u, v}
      sel1: Selection on domains 2, 3, 7, 8
    surf4: Surface | expr = solid.mises; unit = MPa; descr = von Mises stress
      def: Deform "Deformation" | expr = {u, v}
    con1: Contour
      expr = T
      unit = degC
      descr = Temperature
      levelmethod = levels
      levels = range(100,150,1300)
      contourtype = tubes
      radiusexpr = 0.5
      def1: Deform "Deformation 1" | expr = {u, v}
  pg43: PlotGroup2D "Stress (solid) 1.2" | data = dset5
    surf1: Surface | expr = solid.mises; unit = MPa; descr = von Mises stress
      def: Deform "Deformation" | expr = {u, v*1}
      sel1: Selection on domains 1, 4-6
    surf2: Surface | expr = solid.mises; unit = N/m^2; descr = von Mises stress
      def: Deform "Deformation" | expr = {u, v*1}
      sel1: Selection on domains 2, 3, 7, 8
  pg25: PlotGroup2D "Stress (solid) 1.2.1" | data = dset5
    surf1: Surface | expr = solid.E; unit = N/m^2; descr = Young's modulus
      def: Deform "Deformation" | expr = {u, v*1}
      sel1: Selection on domains 1, 4-6
    surf2: Surface (disabled) | expr = solid.mises+3300[kg/m^3]*g_const*(-Y-6[km])*tan(30*pi/180)*0; unit = MPa
      def: Deform "Deformation" | expr = {u, v}
      sel1: Selection (disabled)
  pg35: PlotGroup1D "1D Plot Group 35" | data = dset5
    lngr1: LineGraph on boundaries 15, 16
      expr = v
      unit = m
      descr = Displacement field, Y component
      xdata = expr
      xdataexpr = x
  pg29: PlotGroup1D "1D Plot Group 29" | data = dset2
    lngr2: LineGraph | data = cln5; expr = Y; descr = Y-coordinate; xdata = expr; xdataexpr = T
  pg39: PlotGroup1D "1D Plot Group 39" | data = cln5
    lngr1: LineGraph
      expr = nu_uc*2*st[1/s]*(Y>-d_b2[km])+nu_lc*2*st[1/s]*(Y>-d_co[km])*(Y<-d_b2[km])+nu_oc*2*st[1/s]*(Y<-d_co[km])
      unit = MPa
      xdata = expr
      xdataexpr = -Y
  pg27: PlotGroup1D "1D Plot Group 27" (disabled) | data = cln5
    lngr2: LineGraph (disabled) | expr = Y; descr = Y-coordinate; xdata = expr; xdataexpr = solid.E
    lngr5: LineGraph (disabled) | expr = Y; descr = Y-coordinate; xdata = expr; xdataexpr = solid.mises
    lngr4: LineGraph | expr = Y; descr = Y-coordinate; xdata = expr; xdataexpr = nu_uc*2*st[1/s]*(Y>-d_b2[km])
    lngr6: LineGraph
      expr = Y
      descr = Y-coordinate
      xdata = expr
      xdataexpr = nu_lc*2*st[1/s]*(Y>-d_co[km])*(Y<-d_b2[km])
    lngr7: LineGraph | expr = Y; descr = Y-coordinate; xdata = expr; xdataexpr = nu_oc*2*st[1/s]*(Y<-d_co[km])
  pg32: PlotGroup2D "Stress (solid) 1.1" | data = dset3
    con1: Contour | expr = dom_
      sel1: Selection on domains 1-8
  pg42: PlotGroup1D "1D Plot Group 42" | data = cln6
    lngr1: LineGraph | expr = solid.mises; unit = MPa; descr = von Mises stress; xdata = expr; xdataexpr = -Y

Exports
  plot1: Plot | filename = /home/rhffldm135/바탕화면/201105/co_w1520.txt
  plot2: Plot | filename = /home/rhffldm135/바탕화면/201105/co_T1520.txt
  plot3: Plot | filename = /home/rhffldm135/바탕화면/201105/co_s1520.txt
  plot4: Plot | filename = /home/rhffldm135/바탕화면/201105/co_st1520.txt
  plot5: Plot | filename = /home/rhffldm135/바탕화면/201105/co_s1520.txt
  img1: Image2D "Image 1"
    size = manualprint
    weblockratio = off
    webwidth = 1000
    webheight = 210
    webresolution = 100
    sizedesc = 3780 x 591 px
    printlockratio = off
    printwidth = 640*1.5
    printheight = 100*1.5
    printresolution = 100
    bmpfilename = /home/rhffldm135/바탕화면/201105/co_600_1210T.bmp
    options = off
    axes = off
  img2: Image2D "Image 2"
    size = manualweb
    weblockratio = off
    webwidth = 1000
    webheight = 210
    webresolution = 100
    sizedesc = 254 x 53 mm
    printlockratio = off
    printwidth = 640*1.5
    printheight = 100*1.5
    printresolution = 100
    bmpfilename = /home/rhffldm135/바탕화면/201105/co_400_1203.bmp
    options = off
    axes = off
  anim1: Animation | type = imageseq; framesel = all; height = 100; options = off; axes = off
  img3: Image2D "Image 3"
    size = manualweb
    weblockratio = off
    webwidth = 640
    webheight = 480
    webresolution = 96
    sizedesc = 169 x 127 mm
    printlockratio = off
    printwidth = 120
    printheight = 90
    printresolution = 100
    pngfilename = /home/rhffldm135/바탕화면/201105/131231_1.png
    options = on
    axes = off
  anim2: Animation | type = imageseq; framesel = all; width = 320*1.5; height = 50; options = off; axes = on