// COMSOL Multiphysics 5.4.0.346 model "TOC_reference_input.mph"
// Outline of the model tree

Parameters
  bee = 0
  co = (20)*1e6
  st = 1e-16
  th = tan(pi/180*20)
  stm = st*3600*365*24*L_to*1e3*100
  A1 = 3.16e-26
  A2 = 3.2e-20
  A3 = 7.0e-14
  n1 = 3.0
  n2 = 3.05
  n3 = 3.0
  d_uc = 14.5+3.3*(2)*0+0.5  // upper crust depth
  d_lc = d_tL-d_uc  // lower crust depth
  d_oc = 12  // oceanic crust depth
  d_co = (rho_uc*d_uc+rho_lc*d_lc-(rho_oc-3)*d_oc)/rho_oc  // comp depth
  d_tL = 30  // total depth
  rho_uc = 27  // upper crust density
  rho_lc = 28  // lower crust density
  rho_oc = 33  // oceanic crust density
  L_c = 180  // crust_length
  L_o = 240  // ocean_length
  L_p = 5*4  // margin_length
  L_to = L_c+L_o+L_p+L_c+L_p  // total length
  E_uc = 100e9[Pa]  // young's upper crust
  E_lc = 100e9[Pa]  // young's lower crust
  E_oc = 100e9[Pa]  // young's oceanic crust
  LAB = -d_tL*3-10
  d_om = d_co+d_oc
  rho_se = 20
  d_ba = d_tL-d_om  // basement depth
  stm_ = st*L_to*1e3
  alpha = 0.0
  beta = 0
  ts = 3.1536e12
  abd = (L_p*(d_tL-d_s))/(d_co+d_oc)+L_c
  d_s = 6  // layer maker
  d_mo = d_tL-d_co
  L_os_ = ((-d_mo+d_tL)*L_p)/(-d_ba+d_tL)+L_c
  vari = 2
  dae = 0
  fri = 15
  d_a = 12.9+0.1*num  // mid
  num = 2  // mid_num
  d_b = 1.2+2.8*num  // mid_up
  d_c = d_a-d_b  // mid_low
  d_z = d_tL-d_co-d_a

Functions
  step1: Step | location = ts*10; smooth = ts*10
  step2: Step (disabled) | location = 3.1536e11*6; smooth = 3.1536e11*4
  gp1: GaussianPulse (disabled) | location = L_to/2; sigma = 0.2

Variables
  var3 "Variables 3" (disabled)
    sex = solid.eel11-1/3*(solid.eel11+solid.eel22)
    sxx = solid.el11-1/3*(solid.el11+solid.el22)
    spxx = sex-sxx
    sey = solid.eel22-1/3*(solid.eel11+solid.eel22)
    syy = solid.el22-1/3*(solid.eel11+solid.eel22)
    spyy = sey-syy
    sexy = solid.eel12
    seexy = solid.el12
    spxy = sexy-seexy
    srpxx = d(spxx,TIME)
    srpyy = d(spyy,TIME)
    srpxy = d(spxy,TIME)
    erpii = sqrt(2*srpxy^2+srpxx^2+srpyy^2 + ss)*1
    ss = 1e-34
    srpxx1 = d(sex,TIME)
    srpyy1 = d(sey,TIME)
    srpxy1 = d(sexy,TIME)
    erpii1 = sqrt(2*srpxy1^2+srpxx1^2+srpyy1^2 + ss)
  var1 "Variables 1"
    np_ = sy_*tan(fri*pi/180)+20[MPa]
    np = np_/st[1/s]
    nu_oc = min(nt3_,npc)
    nu_uc = min(nt1_,np)
    nu_lc = min(nt2_,np)
    sy_ = dom
    st_ = st
    npc_ = syc*tan(fri*pi/180)+20[MPa]
    syc = dom
    npc = npc_/st[1/s]
    nt3_ = 3*0.5*(1.76e-14^(-1/3))*(st_^((1-3)/3))*(exp(4.3e5/(3*8.314*T[1/K])))[Pa*s]*vari
    nt2_ = 0.01*0.5*(5.77904e-27^(-1/4.7))*(st_^((1-4.7)/4.7))*(exp(4.85e5/(4.7*8.314*T[1/K])))[Pa*s]*vari
    nt1_ = 0.1*0.5*(1.1e-28^(-1/4))*(st_^((1-4)/4))*(exp(2.23e5/(4*8.314*T[1/K])))[Pa*s]*vari
    nu_oc1 = min(nt3_,npc)
    nt3__ = 2* ((2e-21)^(-1/4))*((st_)^((1-4)/4))*exp((515e3)/8.314/4/T[1/K])[Pa*s]*vari
    nt2__ = 2* ((3.2e-20)^(-1/3))*((st_)^((1-3)/3))*exp((276e3)/8.314/3/T[1/K])[Pa*s]*vari
    nt1__ = 2* ((3.16e-26)^(-1/3.3))*((st_)^((1-3.3)/3.3))*exp(186e3/8.314/3.3/T[1/K])[Pa*s]*vari
  var4 "Variables 4" (disabled)
    d11 = rho_uc*(-Y)*(Y>=-d_uc[km])
    d12 = (rho_uc*d_uc[km]+rho_lc*(-Y-d_uc[km]))*(Y>=-d_tL[km])*(Y<-d_uc[km])
    d1 = (d11+d12+d13)
    d21 = (rho_uc*(y1-Y))*(Y>y2)*(Y<=y1)
    d22 = (rho_uc*(-y2+y1)+rho_lc*(y2-Y))*(Y<=y2)*(Y>y3)
    d23 = (rho_uc*(-y2+y1)+rho_lc*(-y3+y2)+rho_oc*(y3-Y))*(Y<=y3)*(Y>=-d_tL[km])
    d2 = (d21+d22+d23+d24)
    d31 = (rho_oc)*(-d_ba[km]-Y)*(Y<=-d_ba[km])*(Y>=-d_tL[km])
    d32 = ((rho_oc)*(d_tL[km]-d_ba[km])+rho_oc*(-Y-d_tL[km]))*(Y<-d_tL[km])
    d3 = d31+d32
    d13 = ((rho_oc)*(d_tL[km]-d_ba[km])+rho_oc*(-Y-d_tL[km]))*(Y<-d_tL[km])
    d24 = ((rho_oc)*(d_tL[km]-d_ba[km])+rho_oc*(-Y-d_tL[km]))*(Y<-d_tL[km])
    dom_ = d1*(X<L_c[km])+d2*(X>=L_c[km])*(X<=(L_c[km]+L_p[km]))+d3*(X>(L_c[km]+L_p[km]))*(X<(L_to[km]-L_c[km]-L_p[km]))+d4*(X>=(L_to[km]-L_c[km]-L_p[km]))*(X<=(L_to[km]-L_c[km]))+d1*(X>(L_to[km]-L_c[km]))
    d41 = (rho_uc*(y1_-Y))*(Y>y2_)*(Y<=y1_)
    d42 = (rho_uc*(-y2_+y1_)+rho_lc*(y2_-Y))*(Y<=y2_)*(Y>y3_)
    d43 = (rho_uc*(-y2_+y1_)+rho_lc*(-y3_+y2_)+rho_oc*(y3_-Y))*(Y<=y3_)*(Y>=-d_tL[km])
    d4 = (d41+d42+d43+d44)
    d44 = ((rho_oc)*(d_tL[km]-d_ba[km])+rho_oc*(-Y-d_tL[km]))*(Y<-d_tL[km])
    dom = dom_*100[kg/m^3]*g_const
    y2 = (-d_ba+d_uc)/L_p*(X-L_c[km])-d_uc[km]
    y1 = (-d_ba)/L_p*(X-L_c[km])
    y3 = (-d_ba+d_tL)/L_p*(X-L_c[km])-d_tL[km]
    y1_ = -(-d_ba)/L_p*(X-L_to[km]+L_c[km])
    y2_ = -(-d_ba+d_uc)/L_p*(X-L_to[km]+L_c[km])-d_uc[km]
    y3_ = -(-d_ba+d_tL)/L_p*(X-L_to[km]+L_c[km])-d_tL[km]
  var5 "Variables 5"
    d11 = rho_uc*(-Y)*(Y>=-d_uc[km])
    d12 = (rho_uc*d_uc[km]+rho_lc*(-Y-d_uc[km]))*(Y>=-d_tL[km])*(Y<-d_uc[km])
    d1 = (d11+d12+d13)
    d21 = (rho_uc*(y1-Y))*(Y>y2)*(Y<=y1)
    d22 = (rho_uc*(-y2+y1)+rho_lc*(y2-Y))*(Y<=y2)*(Y>y3)
    d23 = (rho_uc*(-y2+y1)+rho_lc*(-y3+y2)+rho_oc*(-Y+y3))*(Y<=y3)*(Y>=-d_tL[km])
    d2 = (d21+d22+d23+d24)
    d31 = (rho_oc-3)*(-d_ba[km]-Y)*(Y<=-d_ba[km])*(Y>=-d_mo[km])
    d32 = ((rho_oc-3)*(d_mo[km]-d_ba[km])+rho_oc*(-Y-d_mo[km]))*(Y<-d_mo[km])*(Y>-d_tL[km])
    d3 = d31+d32+d33
    d13 = (rho_uc*d_uc[km]+rho_lc*d_uc[km]+rho_oc*(-Y-d_tL[km]))*(Y<-d_tL[km])
    d24 = ((rho_uc*(-y2+y1)+rho_lc*(-y3+y2)+rho_oc*(d_tL[km]+y3))+rho_oc*(-Y-d_tL[km]))*(Y<-d_tL[km])
    dom_ = d1*(X<L_c[km])+d2*(X>=L_c[km])*(X<(L_os[km]))+d_2*(X>=L_os[km])*(X<=(L_c[km]+L_p[km]))+d3*(X>(L_c[km]+L_p[km]))*(X<(L_to[km]-L_c[km]-L_p[km]))+d_4*(X>=(L_to[km]-L_c[km]-L_p[km]))*(X<(L_to[km]-L_os[km]))+d4*(X>=(L_to[km]-L_os[km]))*(X<=(L_to[km]-L_c[km]))+d1*(X>(L_to[km]-L_c[km]))
    d41 = (rho_uc*(y1_-Y))*(Y>y2_)*(Y<=y1_)
    d42 = (rho_uc*(-y2_+y1_)+rho_lc*(y2_-Y))*(Y<=y2_)*(Y>y3_)
    d43 = (rho_uc*(-y2_+y1_)+rho_lc*(-y3_+y2_)+rho_oc*(y3_-Y))*(Y<=y3_)*(Y>=-d_tL[km])
    d4 = (d41+d42+d43+d44)
    d44 = ((rho_uc*(-y2+y1)+rho_lc*(-y3+y2)+rho_oc*(d_tL[km]+y3))+rho_oc*(-Y-d_tL[km]))*(Y<-d_tL[km])
    dom = dom_*100[kg/m^3]*g_const
    y2 = (d_uc-d_z-d_b)/(L_os-L_c)*(X-L_os[km])-d_z[km]-d_b[km]
    y1 = (-d_z)/(L_os-L_c)*(X-L_os[km])-d_z[km]
    y3 = (d_tL-d_mo)/(L_os-L_c)*(X-L_os[km])-d_mo[km]
    y1_ = -(-d_z)/(L_os-L_c)*(X-L_to[km]+L_os[km])-d_z[km]
    y2_ = -(d_uc-d_z-d_b)/(L_os-L_c)*(X-L_to[km]+L_os[km])-d_z[km]-d_b[km]
    y3_ = -(d_tL-d_mo)/(L_os-L_c)*(X-L_to[km]+L_os[km])-d_mo[km]
    d_21 = (rho_uc*(y4-Y))*(Y>y5)*(Y<=y4)
    d_22 = (rho_uc*(-y5+y4)+rho_lc*(y5-Y))*(Y<=y5)*(Y>y6)
    d_23 = (rho_uc*(-y5+y4)+rho_lc*(-y6+y5)+(rho_oc-3)*(y6-Y))*(Y<=y6)*(Y>=-d_mo[km])
    d_2 = (d_21+d_22+d_23+d_24+d_25)
    d_24 = (rho_uc*(-y5+y4)+rho_lc*(-y6+y5)+(rho_oc-3)*(y6+d_mo[km])+rho_oc*(-Y-d_mo[km]))*(Y<-d_mo[km])*(Y>=-d_tL[km])
    d_25 = ((rho_uc*(-y5+y4)+rho_lc*(-y6+y5)+(rho_oc-3)*(y6+d_mo[km])+rho_oc*(d_tL[km]-d_mo[km]))+rho_oc*(-Y-d_tL[km]))*(Y<-d_tL[km])
    d33 = ((rho_oc-3)*(d_mo[km]-d_ba[km])+rho_oc*(d_tL-d_mo[km])+rho_oc*(-Y-d_tL))*(Y<=-d_tL[km])
    L_os = ((-d_mo+d_tL)*L_p)/(-d_ba+d_tL)+L_c
    y4 = (-d_ba+d_z)/(L_p+L_c-L_os)*(X-L_os[km])-d_z[km]
    y5 = (-d_ba+d_z+d_b)/(L_p+L_c-L_os)*(X-L_os[km])-d_z[km]-d_b[km]
    y6 = (-d_ba+d_mo)/(L_p+L_c-L_os)*(X-L_os[km])-d_mo[km]
    y4_ = -(-d_ba+d_z)/(L_p+L_c-L_os)*(X-L_to[km]+L_os[km])-d_z[km]
    y5_ = -(-d_ba+d_z+d_b)/(L_p+L_c-L_os)*(X-L_to[km]+L_os[km])-d_z[km]-d_b[km]
    y6_ = -(-d_ba+d_mo)/(L_p+L_c-L_os)*(X-L_to[km]+L_os[km])-d_mo[km]
    d_41 = (rho_uc*(y4_-Y))*(Y>y5_)*(Y<=y4_)
    d_42 = (rho_uc*(-y5_+y4_)+rho_lc*(y5_-Y))*(Y<=y5_)*(Y>y6_)
    d_43 = (rho_uc*(-y5_+y4_)+rho_lc*(-y6_+y5_)+(rho_oc-3)*(y6_-Y))*(Y<=y6_)*(Y>=-d_mo[km])
    d_4 = (d_41+d_42+d_43+d_44+d_45)
    d_44 = (rho_uc*(-y5_+y4_)+rho_lc*(-y6_+y5_)+(rho_oc-3)*(y6_+d_mo[km])+rho_oc*(-Y-d_mo[km]))*(Y<-d_mo[km])*(Y>=-d_tL[km])
    d_45 = ((rho_uc*(-y5_+y4_)+rho_lc*(-y6_+y5_)+(rho_oc-3)*(y6_+d_mo[km])+rho_oc*(d_tL[km]-d_mo[km]))+rho_oc*(-Y-d_tL[km]))*(Y<-d_tL[km])

Geometry
  geom1 "Geometry 1" (2D, length unit km)
    b16: BezierPolygon "upper 1.2"
      p = 
        {L_c, 0, 0, L_c, ((-d_mo+d_tL)*L_p)/(-d_ba+d_tL)+L_c, L_c+L_p, ((-d_mo+d_tL)*L_p)/(-d_ba+d_tL)+L_c}
        {-d_uc, -d_uc, 0, 0, -d_z, -d_ba, -d_b-d_z}
      degree = {1, 1, 1, 1, 1, 1}
      w = {1, 1, 1, 1, 1, 1, 1, 1, 1, 1, 1, 1}
    b17: BezierPolygon "lower 1.2"
      p = 
        {((-d_mo+d_tL)*L_p)/(-d_ba+d_tL)+L_c, L_c, 0, 0, L_c, ((-d_mo+d_tL)*L_p)/(-d_ba+d_tL)+L_c, L_c+L_p}
        {-d_z-d_b, -d_uc, -d_uc, -d_tL, -d_tL, -d_z-d_a, -d_ba}
      degree = {1, 1, 1, 1, 1, 1}
      w = {1, 1, 1, 1, 1, 1, 1, 1, 1, 1, 1, 1}
    b29: BezierPolygon "upper 1.2.1"
      p = 
        {L_to-L_c, L_to-0, L_to-0, L_to-L_c, L_to-(((-d_mo+d_tL)*L_p)/(-d_ba+d_tL)+L_c), L_to-(L_c+L_p), L_to-(((-d_mo+d_tL)*L_p)/(-d_ba+d_tL)+L_c)}
        {-d_uc, -d_uc, 0, 0, -d_z, -d_ba, -d_b-d_z}
      degree = {1, 1, 1, 1, 1, 1}
      w = {1, 1, 1, 1, 1, 1, 1, 1, 1, 1, 1, 1}
    b28: BezierPolygon "lower 1.2.1"
      p = 
        {L_to-(((-d_mo+d_tL)*L_p)/(-d_ba+d_tL)+L_c), L_to-L_c, L_to-0, L_to-0, L_to-L_c, L_to-(((-d_mo+d_tL)*L_p)/(-d_ba+d_tL)+L_c), L_to-(L_c+L_p)}
        {-d_z-d_b, -d_uc, -d_uc, -d_tL, -d_tL, -d_z-d_a, -d_ba}
      degree = {1, 1, 1, 1, 1, 1}
      w = {1, 1, 1, 1, 1, 1, 1, 1, 1, 1, 1, 1}
    b20: BezierPolygon "Bézier Polygon 20"
      p = 
        {L_p+L_c, L_to-(L_p+L_c), L_to-(((-d_mo+d_tL)*L_p)/(-d_ba+d_tL)+L_c), ((-d_mo+d_tL)*L_p)/(-d_ba+d_tL)+L_c}
        {-d_ba, -d_ba, -d_mo, -d_mo}
      degree = {1, 1, 1}
      w = {1, 1, 1, 1, 1, 1}
    b25: BezierPolygon "test2.1"
      p = 
        {0, (L_c), ((-d_mo+d_tL)*L_p)/(-d_ba+d_tL)+L_c, L_to-(((-d_mo+d_tL)*L_p)/(-d_ba+d_tL)+L_c), L_to-L_c, L_to, L_to, 0}
        {(-d_tL), (-d_tL), -d_mo, -d_mo, -d_tL, -d_tL, LAB, LAB}
      degree = {1, 1, 1, 1, 1, 1, 1}
      w = {1, 1, 1, 1, 1, 1, 1, 1, 1, 1, 1, 1, 1, 1}
    pc3: ParametricCurve | pos = {0, -d_tL}; parmin = L_c; parmax = L_to-L_c; coord = {s, 0}
    pc4: ParametricCurve (disabled) | pos = {0, -d_tL-20}; parmax = L_to; coord = {s, 0}
    pt1: Point | p = {L_to/2, -d_ba}
    b26: BezierPolygon "Bézier Polygon 26" (disabled)
      p = {{200, 200, 180}, {-5, -17, -30}}
      degree = {1, 1}
      w = {1, 1, 1, 1}
    b27: BezierPolygon "Bézier Polygon 27" (disabled)
      p = {{200+240, 200+240, 220+240}, {-5, -17, -30}}
      degree = {1, 1}
      w = {1, 1, 1, 1}
    fin: Finalize "Form Union"

Physics
  solid: SolidMechanics on domains 1-7
    dependent variable u = {u, v, w}
    ShapeProperty.order_displacement = 1
    StructuralTransientBehavior.StructuralTransientBehavior = Quasistatic
    lemm1: LinearElasticModel "ocean" (default)
      E_mat = userdef
      E = E_oc
      nu_mat = userdef
      nu = 0.25
      rho_mat = userdef
      rho = rho_oc*100
      vis1: Viscoelasticity (disabled) on all domains
        MaterialModel = SLS
        RelaxationParameter = Elastoviscosity
        etav = 3.15e23
        Gv = solid.G
    free1: Free (default)
    init1: init "Initial Values 1" (default)
    vel1: Velocity "Prescribed Velocity 1" on boundaries 26-28 | Direction = {1, 1, 0}; v = {-stm_/2*step1(t[1/s]), 0, 0}
    vel2: Velocity "Prescribed Velocity 2" on boundaries 1, 3, 5 | Direction = {1, 1, 0}; v = {stm_/2*step1(t[1/s]), 0, 0}
    lemm2: LinearElasticModel "upper" on domains 2, 3, 6, 7
      E_mat = userdef
      E = E_uc*0.005*200
      nu_mat = userdef
      nu = 0.25
      rho_mat = userdef
      rho = rho_uc*100
      vis1: Viscoelasticity on all domains
        MaterialModel = SLS
        RelaxationParameter = Elastoviscosity
        etav = nu_uc
        Gv = solid.G
        minput_temperature_src = root.comp1.T
      plsty1: Plasticity (disabled) on all domains
        sigmags_mat = userdef
        sigmags = nu_uc*st[1/s]
        IsotropicHardeningModel = PerfectlyPlastic
        Et_mat = userdef
        Et = 0
    gr1: Gravity (disabled) on all domains
    lemm3: LinearElasticModel "lower" on domains 2, 6
      E_mat = userdef
      E = E_lc*0.005*200
      nu_mat = userdef
      nu = 0.25
      rho_mat = userdef
      rho = rho_lc*100
      vis1: Viscoelasticity on all domains
        MaterialModel = SLS
        RelaxationParameter = Elastoviscosity
        etav = nu_lc
        Gv = solid.G
        minput_temperature_src = root.comp1.T
      plsty1: Plasticity (disabled) on all domains
        sigmags_mat = userdef
        sigmags = nu_lc*st[1/s]
        IsotropicHardeningModel = PerfectlyPlastic
    disp1: Displacement1 "Prescribed Displacement 1" on boundaries 2 | Direction = {0, 1, 0}
    lemm9: LinearElasticModel "ocean 1.1.1" on domains 5
      E_mat = userdef
      E = nu_oc*st[1/s]*10
      nu_mat = userdef
      nu = 0.25
      rho_mat = userdef
      rho = (rho_oc-3)*100
      ForceLinearStrainRes = 1
      vis3: Viscoelasticity on domains 5
        MaterialModel = SLS
        RelaxationParameter = Elastoviscosity
        etav = nu_oc
        Gv = solid.G
        minput_temperature_src = root.comp1.T
    bndl6: BoundaryLoad on boundaries 4, 23, 29
      FperArea = {0, 3300[kg/m^3]*g_const*v*1, 0}
      FperLength = {0, 3300[kg/m^3]*g_const*v, 0}
    lemm8: LinearElasticModel "ocean 1.1" on domains 1, 4
      E_mat = userdef
      E = nu_oc*st[1/s]*10
      nu_mat = userdef
      nu = 0.25
      rho_mat = userdef
      rho = rho_oc*100
      ForceLinearStrainRes = 1
      vis3: Viscoelasticity on domains 1, 4
        MaterialModel = SLS
        RelaxationParameter = Elastoviscosity
        etav = nu_oc
        Gv = solid.G
        minput_temperature_src = root.comp1.T
  ht: HeatTransfer "Heat Transfer in Solids" on all domains
    dependent variable T
    solid1: SolidHeatTransferModel "Solid 1" (default)
      k_mat = userdef
      k = 3.4
      rho_mat = userdef
      rho = 3300
      Cp_mat = userdef
      Cp = 1000
    init1: init "Initial Values 1" (default)
    ins1: ThermalInsulation (default)
    temp1: TemperatureBoundary "Temperature 1" on boundaries 7, 10, 14-16, 19, 22, 25 | T0 = 293.15[K]-20[K]
    temp7: TemperatureBoundary "Temperature 7" on boundaries 2 | T0 = 273.15[K]+1350[K]
    temp8: TemperatureBoundary "Temperature 8" on boundaries 4, 8, 12, 20, 23 | T0 = 273.15[K]+650[K]+1[K]*alpha
    temp5: TemperatureBoundary "Temperature 5" (disabled) on boundaries 4, 23 | T0 = 273.15[K]+550[K]-0[K]
    temp9: TemperatureBoundary "Temperature 9" (disabled) on no boundaries | T0 = 273.15[K]+950[K]

Mesh
  mesh1 "Mesh 1"
    size: MeshSizeDefault | hmax = 20; hmin = 0.001; hcurve = 0.2; custom = on; hgrad = 1.1
    ftri2: FreeTri "Free Triangular 2" on domains 4, 5
      size1: Size on domains 4, 5 | custom = on; hmax = 1
    ftri3: FreeTri "Free Triangular 3" on remaining entities

Studies
  std1 "Study 1"
    param: Parametric "Parametric Sweep" | sweeptype = filled; pname = alpha; plistarr = range(0,-10,-300)
    stat: Stationary | geometricNonlinearity = on; solve for = {ht}
    time: Transient "Time Dependent" | tlist = range(0,ts/2,ts*100/2); geometricNonlinearity = on; solve for = {solid}

Solver configurations
  sol1 "Solution 1" (study std1)
    v1: Variables "Dependent Variables 1"
    s1: Stationary "Stationary Solver 1"
      fc1: FullyCoupled | linsolver = d1; initstep = 0.01; minstep = 1.0E-6; maxiter = 50
      d1: Direct "PARDISO (ht)" | linsolver = pardiso; pivotperturb = 1.0E-13
    su1: StoreSolution
    v2: Variables "Dependent Variables 2" | initmethod = sol; resscalemethod = manual; notsolmethod = sol
      comp1_u: Field "Displacement field (comp1.u)" | scalemethod = manual; scaleval = 1e-2*647765.3896280659
    t1: Time "Time-Dependent Solver 1" | tlist = range(0,ts/2,ts*100/2)
      dDef: Direct
      fc1: FullyCoupled
  sol3 "Parametric Solutions 1" (study std1)
  sol2 "Solution Store 1" (study std1)

Datasets
  dset2: Solution | solution = none
  dset3: Solution | solution = sol1
  dset4: Solution | solution = sol2
  dset5: Solution | solution = sol3
  cln1: CutLine2D | data = dset5; genpoints = {{320, 0}, {320, -100}}
  cln2: CutLine2D
    data = dset5
    genpoints = {{200, 0}, {200, -100}}
    genparadist = range(20,220/11,240)
    spacevars = cln1x
    normal = {cln1nx, cln1ny}

Plots
  pg32: PlotGroup2D "Isothermal Contours (ht)" | data = dset3
    con1: Contour | expr = dom_
      sel1: Selection on domains 1-7
      def1: Deform "Deformation 1" | expr = {u, v}
    surf1: Surface (disabled) | expr = dom_
      def1: Deform "Deformation 1" | expr = {u, v}
      sel1: Selection (disabled) on domains 1, 4, 5
    con2: Contour (disabled) | expr = d_2
  pg33: PlotGroup2D "Stress (solid)" | data = dset5
    surf1: Surface | expr = solid.mises; unit = MPa; descr = von Mises stress
      def: Deform "Deformation" | expr = {u, v}
    surf2: Surface | expr = 1; unit = 1
      def: Deform "Deformation" | expr = {u, v}
      sel1: Selection on domains 2, 3, 6, 7
    mesh1: Mesh (disabled)
  pg34: PlotGroup2D "Temperature (ht)" | data = dset5
    surf1: Surface | expr = T; unit = degC; descr = Temperature
  pg35: PlotGroup2D "Isothermal Contours (ht) 1" | data = dset5
    con1: Contour | expr = T; unit = K; descr = Temperature
  pg36: PlotGroup1D "1D Plot Group 36" | data = dset5
    lngr1: LineGraph on boundaries 15, 16
      expr = ht.ndflux
      unit = mW/m^2
      descr = Normal conductive heat flux
      xdata = expr
      xdataexpr = x
  pg37: PlotGroup1D "1D Plot Group 37" | data = cln1
    lngr1: LineGraph | expr = Y; descr = Y-coordinate; xdata = expr; xdataexpr = T
  pg38: PlotGroup1D "1D Plot Group 38" | data = cln1
    lngr1: LineGraph | expr = nu_oc*st[1/s]*2; unit = MPa; xdata = expr; xdataexpr = -Y
  pg39: PlotGroup1D "1D Plot Group 39" | data = dset5
    lngr1: LineGraph on boundaries 15, 16
      expr = v
      unit = m
      descr = Displacement field, Y component
      xdata = expr
      xdataexpr = x
  pg40: PlotGroup1D "1D Plot Group 40" (disabled) | data = dset5
    ptgr1: PointGraph on points 12 | expr = abs(v)
  pg41: PlotGroup1D "1D Plot Group 41" (disabled) | data = cln2
    lngr1: LineGraph | expr = Y; descr = Y-coordinate; xdata = expr; xdataexpr = dom_
  pg42: PlotGroup1D "1D Plot Group 42" | data = cln2
    lngr1: LineGraph | expr = solid.mises; unit = MPa; descr = von Mises stress; xdata = expr; xdataexpr = -Y
  pg43: PlotGroup1D "1D Plot Group 43" | data = dset5
    lngr1: LineGraph on boundaries 15, 16
      expr = v
      unit = m
      descr = Displacement field, Y component
      xdata = expr
      xdataexpr = x

Exports
  plot1: Plot | filename = /home/rhffldm135/바탕화면/201105/oc_w1520.txt
  plot2: Plot | filename = /home/rhffldm135/바탕화면/201105/oc_T1520.txt
  plot3: Plot | filename = /home/rhffldm135/바탕화면/201105/oc_s1520.txt
  plot4: Plot | filename = /home/rhffldm135/바탕화면/201105/oc_st1520.txt
  img1: Image2D "Image 1"
    size = manualprint
    weblockratio = off
    webwidth = 1000
    webheight = 210
    webresolution = 100
    printlockratio = off
    printwidth = 640*1
    printheight = 100*1
    printresolution = 100
    bmpfilename = /home/rhffldm135/바탕화면/201105/oc_600.bmp
    options = off
    axes = off
  plot5: Plot | filename = /home/rhffldm135/바탕화면/201105/oc_s1520.txt